*Node, NSET=Nall
1, 2, 6.12323e-017, 2
2, 2, 6.12323e-017, 0
3, 1.77046, 0.930302, 2
4, 1.13454, 1.64707, 2
5, 0.238194, 1.98577, 2
6, -0.712824, 1.86866, 2
7, -1.50022, 1.32262, 2
8, -1.94326, 0.472998, 2
9, -1.94025, -0.485198, 2
10, -1.49188, -1.33202, 2
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*Element, TYPE=C3D10, ELSET=Eall
133, 38, 45, 17, 18, 214, 164, 126, 127, 163, 74,
134, 3, 27, 1, 55, 155, 85, 58, 216, 215, 217,
135, 46, 8, 54, 31, 180, 207, 206, 218, 96, 219,
136, 56, 7, 46, 31, 220, 179, 221, 222, 97, 218,
137, 36, 34, 35, 43, 223, 119, 225, 149, 224, 226,
138, 23, 48, 40, 53, 170, 227, 137, 196, 205, 228,
139, 24, 48, 52, 41, 169, 190, 189, 139, 229, 230,
140, 45, 37, 17, 50, 231, 125, 164, 192, 232, 193,
141, 50, 37, 44, 29, 232, 233, 176, 235, 234, 236,
142, 28, 3, 44, 29, 86, 159, 237, 90, 89, 236,
143, 12, 13, 52, 33, 68, 211, 209, 104, 107, 238,
144, 47, 40, 53, 22, 239, 228, 195, 167, 135, 194,
145, 45, 37, 56, 38, 231, 240, 241, 214, 128, 242,
146, 5, 4, 29, 50, 60, 88, 91, 175, 174, 235,
147, 26, 25, 49, 42, 82, 172, 171, 143, 142, 243,
148, 56, 54, 46, 39, 244, 206, 221, 246, 245, 247,
149, 15, 36, 44, 37, 121, 248, 161, 122, 124, 233,
150, 26, 34, 42, 49, 249, 250, 143, 171, 251, 243,
151, 3, 27, 55, 44, 155, 215, 216, 159, 158, 252,
152, 25, 24, 52, 41, 81, 189, 191, 140, 139, 230,
153, 34, 57, 55, 27, 253, 254, 256, 257, 255, 215,
154, 32, 35, 33, 43, 117, 118, 106, 258, 226, 259,
155, 10, 53, 32, 11, 208, 260, 100, 66, 210, 103,
156, 48, 12, 33, 11, 184, 104, 261, 183, 67, 105,
157, 48, 41, 33, 52, 229, 262, 261, 190, 230, 238,
158, 26, 57, 42, 34, 263, 264, 143, 249, 253, 250,
159, 5, 45, 29, 30, 177, 265, 91, 93, 266, 94,
160, 49, 25, 52, 41, 172, 191, 200, 267, 140, 230,
161, 26, 57, 34, 27, 263, 253, 249, 156, 255, 257,
162, 27, 34, 14, 55, 257, 108, 157, 215, 256, 268,
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

***********************************************************
** Element sets for materials and FEM element type (solid, shell, beam)
** written by write_element_sets_material_and_femelement_type function
*ELSET,ELSET=MechanicalMaterialSolid
Eall

***********************************************************
** Node set for fixed constraint
** written by write_node_sets_constraints_fixed function
*NSET,NSET=FemConstraintFixed
2,
15,
16,
17,
18,
19,
20,
21,
22,
23,
24,
25,
26,
71,
72,
73,
74,
75,
76,
77,
78,
79,
80,
81,
82,
83,

***********************************************************
** Node sets for prescribed displacement constraint
** written by write_node_sets_constraints_displacement function

***********************************************************
** Node sets for loads
** written by write_node_sets_constraints_force function

***********************************************************
** Materials
** written by write_materials function
** Young's modulus unit is MPa = N/mm2
**FreeCAD material name: Steel
*MATERIAL, NAME=MechanicalMaterial
*ELASTIC
200000 ,  0.300
*DENSITY
7.900e-09,

***********************************************************
** Sections
** written by write_femelementsets function
*SOLID SECTION, ELSET=MechanicalMaterialSolid, MATERIAL=MechanicalMaterial

***********************************************************
** One step is needed to calculate the mechanical analysis of FreeCAD
** loads are applied quasi-static, means without involving the time dimension
** written by write_step_begin function
*STEP
*STATIC

***********************************************************
** Constaints
** written by write_constraints_fixed function
*BOUNDARY
FemConstraintFixed,1
FemConstraintFixed,2
FemConstraintFixed,3


***********************************************************
** Displacement constraint applied
** written by write_constraints_displacement function


***********************************************************
** Node loads
** written by write_constraints_force function
*CLOAD

***********************************************************
** Element + CalculiX face + load in [MPa]
** written by write_constraints_pressure function
*DLOAD
** Load on face Face3
142,P2,1000.0
143,P2,1000.0
146,P1,1000.0
154,P1,1000.0
155,P4,1000.0
156,P3,1000.0
159,P4,1000.0
166,P4,1000.0
174,P2,1000.0
182,P3,1000.0
183,P3,1000.0
184,P2,1000.0
195,P1,1000.0
196,P3,1000.0
198,P4,1000.0
200,P4,1000.0
202,P4,1000.0
204,P2,1000.0
209,P4,1000.0
211,P3,1000.0
220,P2,1000.0
224,P2,1000.0
227,P3,1000.0
248,P4,1000.0
251,P3,1000.0
253,P4,1000.0
255,P1,1000.0

***********************************************************
** Outputs --> frd file
** written by write_outputs_types function
*NODE FILE
U
*EL FILE
S, E
** outputs --> dat file
*NODE PRINT , NSET=Nall
U
*EL PRINT , ELSET=Eall
S

***********************************************************
** written by write_step_end function
*END STEP

***********************************************************
** CalculiX Input file
** written by write_footer function
**   written by    --> FreeCAD 0.16.6706 (Git)
**   written on    --> Mon Apr 17 15:16:10 2017
**   file name     --> vh.FCStd
**   analysis name --> MechanicalAnalysis001
**
**
**
**   Units
**
**   Geometry (mesh data)        --> mm
**   Materials (Young's modulus) --> N/mm2 = MPa
**   Loads (nodal loads)         --> N
**
